// COMSOL Multiphysics 6.0.0.318 model "bench.mph"
// Outline of the model tree

Parameters
  lam0 = 500[nm]
  n1 = 1.0
  n2 = 3.0-0.5i
  d = 200[nm]
  n3 = 1.0
  a = 100[nm]
  d1 = 2*lam0
  d3 = 2*lam0
  dpml = 0.5*lam0
  dsys = 2*dpml+d1+d3+d
  E0 = 1[V/m]
  P0 = E0^2/(2*Z0_const)*n1*a

Coordinate systems
  pml1: PML "Perfectly Matched Layer 1" on domains 1, 5

Geometry
  geom1 "Geometry 1" (2D, length unit m)
    r1: Rectangle
      pos = {0, -dpml-d1}
      layername = {Layer 1, Layer 2, Layer 3, Layer 4}
      layer = {dpml, d1, d, d3}
      size = {a, dsys}
    fin: Finalize "Form Union"

Materials
  mat1: Common "Material 1" on all domains
    RefractiveIndex
      n = n1
      ki = 0
  mat2: Common "Material 2" on domains 3
    RefractiveIndex
      n = n2
      ki = 0
  mat3: Common "Material 3" on domains 4, 5
    RefractiveIndex
      n = n3
      ki = 0

Physics
  ewfd: ElectromagneticWavesFrequencyDomain on all domains
    dependent variable E = {Ex, Ey, Ez}
    wee1: WaveEquationElectric (default)
    pec1: PerfectElectricConductor (default)
    init1: init "Initial Values 1" (default)
    port1: Port on boundaries 4
      Pin = P0
      PortSlit = 1
      SlitType = DomainBacked
      PortType = Periodic
      Eampl = {1, 0, 0}
      n = n1
    port2: Port on boundaries 10
      PortSlit = 1
      SlitType = DomainBacked
      PortOrientation = ReversePort
      PortType = Periodic
      Eampl = {1, 0, 0}
      n = n3
    pc1: PeriodicCondition on boundaries 1, 3, 5, 7, 9, 12-16
      PeriodicType = Floquet
      Floquet_source = FromPeriodicPort
      destinationDomains: boundaries 12-16

Mesh
  mesh1 "Mesh 1"
    size: MeshSizeDefault | hmax = lam0/50; hmin = 0.1e-9; hnarrow = 5
    map1: Map "Mapped 1" on remaining entities

Studies
  std1 "Study 1"
    wave: Wavelength "Wavelength Domain" | punit = nm; plist = lam0

Solver configurations
  sol1 "Solution 1" (study std1)
    v1: Variables "Dependent Variables 1"
    s1: Stationary "Stationary Solver 1" | stol = 0.01
      p1: Parametric | pname = lambda0; plistarr = lam0; punit = nm; pcontinuationmode = no
      fc1: FullyCoupled | linsolver = d1
      d1: Direct "Suggested Direct Solver (ewfd)"

Datasets
  dset1: Solution | solution = sol1

Derived values
  gev1: EvalGlobal "Reflectance, Transmittance, and Absorptance (ewfd)"
    data = dset1
    table = tbl1
    expr = {ewfd.Rorder_0, ewfd.Rtotal, ewfd.Torder_0, ewfd.Ttotal, ewfd.RTtotal, ewfd.Atotal}

Tables
  tbl1: Table
    lambda0 (nm) | Reflectance, order 0 (1) | Total reflectance (1) | Transmittance, order 0 (1) | Total transmittance (1) | Total reflectance and transmittance (1) | Absorptance (1)
    500 | 0.616561 | 0.616561 | 0.38344 | 0.38344 | 1 | 4.98258e-19

Plots
  pg1: PlotGroup2D "Electric Field (ewfd)" | data = dset1
    surf1: Surface | expr = ewfd.normE
  pg2: PlotGroup1D "Polarization Plot (ewfd)" | data = dset1; title = Polarization states, Color: Phase (Radians)
    plz1: Polarization | display = 0; legends = Reflection
      col1: Color "Color Expression 1" | expr = phase
    plz2: Polarization | display = 1; legends = Transmission
      col1: Color "Color Expression 1" | expr = phase
  pg3: PlotGroup1D "1D Plot Group 3" | data = dset1
    lngr1: LineGraph on boundaries 3, 5, 7 | expr = abs(ewfd.Ex); xdata = expr; xdataexpr = y